Simulations: Version=215
  Folder Replacements
    Report HarvestReport: EventNames=[Wheat].Harvesting
      VariableNames:
        [Clock].Today
        [Wheat].SowingDate
        [Wheat].SowingData.Cultivar
        [Wheat].Phenology.EmergenceDAS
        [Wheat].Phenology.TerminalSpikeletDAS
        [Wheat].Phenology.FlagLeafDAS
        [Wheat].Phenology.HeadingDAS
        [Wheat].Phenology.FloweringDAS
        [Wheat].Phenology.MaturityDAS
        [Wheat].Grain.Total.Wt * 10 as Yield
        [Wheat].AboveGround.Wt
        [FrostHeatDamageFunctions].FrostHeatYield as Wheat.Grain.FrostHeatYield
    Report DailyReport (disabled): EventNames=[Clock].DoReport
      VariableNames:
        [Clock].Today
        [Wheat].Leaf.CoverGreen
        [Wheat].Leaf.CoverTotal
        [Wheat].Leaf.LAI
        [Wheat].Phenology.Stage
        [Wheat].Phenology.CurrentPhaseName
        [Wheat].SowingDate
        [Wheat].Phenology.Zadok.Stage
    Plant Wheat
      FrostHeatDamageFunctions: CropType=1; FrostLowTT=-4; FrostMaxReductionRatio=0.4; FrostUpTT=1; FrostMinReductionRatio=0; FrostStartSensitiveGS=6.4855; FrostStartMostSensitiveGS=8; FrostEndMostSensitiveGS=9.4983; FrostEndSensitiveGS=9.4991; HeatLowTT=30.346; HeatMinReductionRatio=0; HeatUpTT=34.0001; HeatMaxReductionRatio=0.2032; HeatStartSensitiveGS=7.2832; HeatStartMostSensitiveGS=7.4832; HeatEndMostSensitiveGS=8.9709; HeatEndSensitiveGS=9.0945
  DataStore
  Experiment Field
    Factors
      Permutation
        Factor Cultivar
          Specification=[Sowing].Script.CultivarName=spring very quick-quick, spring quick, spring quick-mid, spring mid, spring mid-slow, spring slow, spring slow-very slow, spring very slow, winter very-quick, winter quick, winter mid, winter very slow
        Factor SowingDate
          Specification=[Sowing].Script.SowDate=21-apr, 24-apr, 27-apr, 30-apr, 03-may, 06-may, 09-may
        Factor Fertilisation: Specification=[SowingFertiliser].Script.Amount=200
    Simulation
      Clock: Start=1976-01-01; End=2025-12-31
      Summary SummaryFile
      Weather: FileName=-35.120_147.370.met
      SoilArbitrator
      Zone Field: Area=1; Slope=0; AspectAngle=0; Altitude=50
        Fertiliser
        Soil: ASCOrder=Kandosol; ASCSubOrder=Red; SoilType=Other; Site=Generic-NSW; State=Generic; Country=Australia; ApsoilNumber=498-GENERIC; Latitude=-35.1155; Longitude=147.3695; LocationAccuracy=Regional Soil Type; YearOfSampling=0; DataSource=Generic soil; Comments=Generic soil developed for CSU.
          Physical
            Thickness  BD    AirDry  LL15  DUL   SAT
            100        1.48  0.055   0.11  0.29  0.35
            150        1.5   0.104   0.13  0.27  0.34
            150        1.45  0.15    0.15  0.25  0.32
            150        1.37  0.15    0.15  0.28  0.36
            150        1.43  0.15    0.15  0.29  0.35
            300        1.55  0.15    0.15  0.31  0.34
            300        1.67  0.15    0.15  0.31  0.34
            300        1.62  0.15    0.15  0.32  0.35
            BD, AirDry, LL15, DUL, SAT source: Estimated based on local knowledge
            SoilCrop wheatSoil: LL=[0.11, 0.13, 0.15, 0.17, 0.19, 0.22, 0.26, 0.28]; KL=[0.06, 0.06, 0.04, 0.04, 0.04, 0.04, 0.02, 0.02]; XF=[1, 1, 1, 0.9, 0.9, 0.9, 0.9, 0.8]
              LL source: Estimated based on local knowledge
            SoilCrop barleySoil: LL=[0.11, 0.13, 0.15, 0.17, 0.19, 0.22, 0.26, 0.28]; KL=[0.07, 0.07, 0.07, 0.07, 0.05, 0.05, 0.03, 0.02]; XF=[1, 1, 1, 0.9, 0.9, 0.9, 0.9, 0.8]
              LL source: Estimated based on local knowledge
            SoilCrop oatsSoil: same as Field.Simulation.Field.Soil.Physical.wheatSoil
            SoilCrop canolaSoil: LL=[0.11, 0.13, 0.15, 0.17, 0.19, 0.22, 0.26, 0.28]; KL=[0.08, 0.08, 0.08, 0.08, 0.08, 0.06, 0.04, 0.02]; XF=[1, 1, 1, 1, 0.9, 0.9, 0.9, 0.8]
              LL source: Estimated based on local knowledge
          WaterBalance SoilWater: SummerDate=1-Nov; SummerU=6; SummerCona=3.5; WinterDate=1-Apr; WinterU=2; WinterCona=2; DiffusConst=44; DiffusSlope=16; Salb=0.13; CN2Bare=84; CNRed=20; CNCov=0.8; PSIDul=-100; Thickness=[100, 150, 150, 150, 150, 300, 300, 300]; SWCON=[0.5, 0.4, 0.3, 0.3, 0.2, 0.1, 0.1, 0.1]
          Organic: FOMCNRatio=45; CarbonUnits=WalkleyBlack
            Thickness  Carbon  SoilCNRatio  FBiom  FInert  FOM
            100        1       12.5         0.03   0.4     437.3427
            150        0.5     12.5         0.02   0.6     330.1236
            150        0.5     12.5         0.02   0.7     249.1903
            150        0.5     12.5         0.02   0.8     188.0987
            150        0.5     12.5         0.01   0.9     141.9844
            300        0.5     12.5         0.01   0.9     80.9003
            300        0.5     12.5         0.01   1       46.0956
            300        0.5     12.5         0.01   1       26.2645
          Chemical: Thickness=[100, 150, 150, 150, 150, 300, 300, 300]; PH=[6, 6, 6, 6, 6, 6, 6, 6]; PHUnits=Water
            PH source: Estimated based on local knowledge
          Nutrient
          Solute NO3: Thickness=[100, 150, 150, 150, 150, 300, 300, 300]; InitialValuesUnits=kg/ha; WaterTableConcentration=0; D0=0; DepthConstant=0; MaxDepthSoluteAccessible=0; RunoffEffectivenessAtMovingSolute=0; MaxEffectiveRunoff=0
            InitialValues=[9.4486, 11.0609, 8.1941, 6.0703, 4.497, 5.7995, 3.1828, 1.7468]
          Solute NH4: InitialValuesUnits=ppm; WaterTableConcentration=0; D0=0; DepthConstant=0; MaxDepthSoluteAccessible=0; RunoffEffectivenessAtMovingSolute=0; MaxEffectiveRunoff=0
          Solute Urea: Thickness=[100, 150, 150, 150, 150, 300, 300, 300]; InitialValues=[0, 0, 0, 0, 0, 0, 0, 0]; InitialValuesUnits=kg/ha; WaterTableConcentration=0; D0=0; DepthConstant=0; MaxDepthSoluteAccessible=0; RunoffEffectivenessAtMovingSolute=0; MaxEffectiveRunoff=0
          Water: Thickness=[100, 150, 150, 150, 150, 300, 300, 300]; InitialValues=[0.29, 0.27, 0.25, 0.28, 0.29, 0.31, 0.31, 0.32]; FilledFromTop=false
          SoilTemperature Temperature: InteractionsPerDay=8
        SurfaceOrganicMatter: InitialResidueName=wheat_stubble; InitialResidueType=wheat; InitialResidueMass=500; InitialStandingFraction=0; InitialCPR=0; InitialCNR=100
        Plant Wheat
        MicroClimate: a_interception=0; b_interception=1; c_interception=0; d_interception=0; SoilHeatFluxFraction=0.4; MinimumHeightDiffForNewLayer=0; NightInterceptionFraction=0.5; ReferenceHeight=2
        Manager SowingFertiliser
          Amount = 300
          CropName = wheat
```csharp
using Models.Soils;
using System;
using Models.Core;
using Models.PMF;
namespace Models
{
    [Serializable]
    public class Script : Model
    {
        [Link] Clock Clock;
        [Link] Fertiliser Fertiliser;
        [Link] Summary Summary;
        
        
        [Description("Amount of fertiliser to be applied (kg/ha)")]
        public double Amount { get; set;}
        
        [Description("Crop to be fertilised")]
        public string CropName { get; set;}
        
        
        

        [EventSubscribe("Sowing")]
        private void OnSowing(object sender, EventArgs e)
        {
            Model crop = sender as Model;
            if (crop.Name.ToLower()==CropName.ToLower())
                Fertiliser.Apply(amount: Amount, type: "NO3N");
        }
        
    }
}
```
        Manager Harvesting
          Crop = [Wheat]
```csharp
using APSIM.Shared.Utilities;
using Models.Utilities;
using Models.Soils;
using Models.PMF;
using Models.Core;
using System;
using System.Linq;

namespace Models
{
    [Serializable] 
    public class Script : Model
    {
        [Description("Crop")]
        public IPlant Crop { get; set; }
        
        [EventSubscribe("DoManagement")]
        private void OnDoManagement(object sender, EventArgs e)
        {
            if (Crop.IsReadyForHarvesting)
            {
                Crop.Harvest();
                Crop.EndCrop();
            }
        }
    }
}
```
        Report HarvestReport: EventNames=[Wheat].Harvesting
          VariableNames:
            [Clock].Today
            [Wheat].SowingDate
            [Wheat].SowingData.Cultivar
            [Wheat].Phenology.CurrentPhase.Name
            [Wheat].Phenology.CurrentStageName
            [Wheat].Phenology.EmergenceDAS
            [Wheat].Phenology.TerminalSpikeletDAS
            [Wheat].Phenology.FlagLeafDAS
            [Wheat].Phenology.HeadingDAS
            [Wheat].Phenology.FloweringDAS
            [Wheat].Phenology.MaturityDAS
            [Wheat].Grain.Wt
            [Wheat].Grain.N
            [Wheat].Grain.Number
            [Wheat].Grain.Size
            [Wheat].Grain.NConc
            [Wheat].AboveGround.Wt
            [Wheat].AboveGround.N
            [Wheat].Grain.Protein
            [Wheat].Grain.Size
            [Wheat].Phenology.HaunStageTerminalSpikelet
            [Wheat].Leaf.FinalLeafNumber
            [Wheat].Leaf.MainStemPopulation
            [Wheat].SowingData.Cultivar
            [Wheat].SowingDate.DayOfYear
            [Wheat].Leaf.CohortMaxSize
            [Clock].StartDate
            ([Wheat].Phenology.FloweringDAS - [Wheat].Phenology.EmergenceDAS) as FloweringDAE
            [Wheat].SowingData.Cultivar
        Report DailyReport (disabled): EventNames=[Clock].DoReport
          VariableNames:
            [Clock].Today
            [Soil].Water.Volumetric
            sum([Soil].Water.MM) as ProfileWater
            sum([Soil].NO3.kgha) as TotalNO3
            [IWeather].Radn
            [IWeather].MeanT
            [Wheat].AboveGround.N
            [Wheat].AboveGround.Wt
            [Wheat].AboveGroundLive.N
            [Wheat].AboveGroundLive.Wt
            [Wheat].AboveGroundDead.N
            [Wheat].AboveGroundDead.Wt
            [Wheat].Ear.N
            [Wheat].Ear.NConc
            [Wheat].Ear.Wt
            [Wheat].Grain.N
            [Wheat].Grain.NConc
            [Wheat].Grain.Number
            [Wheat].Grain.Size
            [Wheat].Grain.Wt
            [Wheat].Leaf.Tips
            [Wheat].Leaf.CoverGreen
            [Wheat].Leaf.CoverTotal
            [Wheat].Leaf.Dead.N
            [Wheat].Leaf.Dead.NConc
            [Wheat].Leaf.Dead.Wt
            [Wheat].Leaf.DeadCohortNo
            [Wheat].Leaf.SenescingCohortNo
            [Wheat].Leaf.Ligules
            [Wheat].Leaf.Fn
            [Wheat].Leaf.Fw
            [Wheat].Leaf.Height
            [Wheat].Leaf.InitialisedCohortNo
            [Wheat].Leaf.LAI
            [Wheat].Leaf.Live.N
            [Wheat].Leaf.Live.NConc
            [Wheat].Leaf.Live.Wt
            [Wheat].Leaf.SpecificArea
            [Wheat].Leaf.SpecificNitrogen
            [Wheat].Leaf.Transpiration
            [Wheat].Phenology.CurrentPhase.Name
            [Wheat].Phenology.CurrentStageName
            [Wheat].Phenology.EmergenceDAS
            [Wheat].Phenology.Stage
            [Wheat].Phenology.ThermalTime
            [Wheat].Phenology.Zadok.Stage
            [Wheat].Root.Depth
            [Wheat].Root.N
            [Wheat].Root.Wt
            [Wheat].Root.NConc
            [Wheat].Spike.N
            [Wheat].Spike.NConc
            [Wheat].Spike.Wt
            [Wheat].Stem.N
            [Wheat].Stem.NConc
            [Wheat].Stem.Wt
            [Wheat].StemPlusSpike.Wt
            [Wheat].StemPlusSpike.N
            [Wheat].SowingData.Cultivar
            [Wheat].Phenology.HaunStage
            [Wheat].Phenology.HaunStage
            [Wheat].Leaf.Height
            [Wheat].Leaf.Tips
            [Wheat].Leaf.FinalLeafNumber
            [Wheat].Leaf.MainStemPopulation
            [Wheat].Leaf.StemPopulation
            [Wheat].Phenology.PTQ
            [Wheat].Phenology.Phyllochron
            [Wheat].Total.N
            [Wheat].Total.Wt
            ([Wheat].Leaf.Transpiration + [Soil].SoilWater.Es + [MicroClimate].PrecipitationInterception) as ET
            [IWeather].MeanT
            [Wheat].Phenology.Photoperiod
            [Wheat].Phenology.AccumulatedTT
        Manager Sowing
          Crop = [Wheat]
          SowDate = 24-Jul
          CultivarName = Suntop
          SowingDepth = 50
          RowSpacing = 230
          Population = 150
```csharp
using APSIM.Shared.Utilities;
using Models.Utilities;
using Models.Soils;
using Models.PMF;
using Models.Core;
using System;
using System.Linq;

namespace Models
{
    [Serializable]
    public class Script : Model
    {
        [Link] Clock Clock;
        [Link] Fertiliser Fertiliser;
        [Link] Summary Summary;
        [Link] Soil Soil;
        
        [Description("Crop")]
        public IPlant Crop { get; set; }

        [Description("Sowing date (d-mmm)")]
        public string SowDate { get; set; }

        [Display(Type = DisplayType.CultivarName)]
        [Description("Cultivar to be sown")]
        public string CultivarName { get; set; }

        [Description("Sowing depth (mm)")]
        public double SowingDepth { get; set; }

        [Description("Row spacing (mm)")]
        public double RowSpacing { get; set; }

        [Description("Plant population (/m2)")]
        public double Population { get; set; }

        [EventSubscribe("DoManagement")]
        private void OnDoManagement(object sender, EventArgs e)
        {
            if (DateUtilities.WithinDates(SowDate, Clock.Today, SowDate))
            {
                Crop.Sow(population: Population, cultivar: CultivarName, depth: SowingDepth, rowSpacing: RowSpacing);    
            }
        }
    }
}
```
        Manager Reset on sowing
          ResetWater = True
          ResetNutrients = True
          ResetSOM = True
```csharp
using Models.Soils.Nutrients;
using APSIM.Shared.Utilities;
using Models.Surface;
using Models.Utilities;
using Models.Soils.Nutrients;
using Models.Soils;
using Models.PMF;
using Models.Core;
using System;
using System.Linq;
using Models.Interfaces;

namespace Models
{
    [Serializable]
    public class Script : Model
    {
        [Link] private Plant Wheat;
        [Link] private ISoilWater SoilWater;
        [Link] private Nutrient nutrient;
        [Link] private SurfaceOrganicMatter SOM;
        [Link] private Summary Summary;

        [Description("Reset Water?")]
        public bool ResetWater {get;set;}

        [Description("Reset Soil Nutrients?")]
        public bool ResetNutrients {get;set;}

        [Description("Reset Surface Organic Matter?")]
        public bool ResetSOM {get;set;}

        [EventSubscribe("Sowing")]
        private void OnSowing(object sender, EventArgs e)
        {
            if (ResetWater)
            {
                Summary.WriteMessage(this, "Reset Water", MessageType.Diagnostic);
                SoilWater.Reset();
            }
            if (ResetNutrients)
            {
                Summary.WriteMessage(this, "Reset Nutrients", MessageType.Diagnostic);
                nutrient.Reset();
            }
            if (ResetSOM)
            {
                Summary.WriteMessage(this, "Reset Surface OM", MessageType.Diagnostic);
                SOM.Reset();
            }
        }
    }
}
```
